// COMSOL Multiphysics 5.6.0.280 model "better2.mph"
// Outline of the model tree

Parameters
  r1 = 2.8[K/min]
  r2 = 1.2[K/min]
  r3 = -2.5[K/min]
  dt1 = 48[min]
  t1 = dT1/r1
  dt3 = 65[min]
  dt2 = dT2/r2
  dt4 = (dT1+dT2)/(-r3)
  dt5 = 500*60-(t1+dt1+dt2+dt3+dt4)
  t6 = 500[min]
  T0 = 293[K]
  dT1 = 123[K]
  dT2 = 52[K]
  vf = 0.40383  // 纤维体积分数
  vr = 1-vf  // 树脂体积分数
  pc = 1578[kg/m^3]  // 构件密度
  Cpc = 862[J/(kg*K)]  // 构件比热容
  kc11 = 5.43[W/(m*K)]  // 构件x向热传导系数
  kc22 = 0.4135[W/(m*K)]  // 构件与y,z向热传导系数
  pt = 8150[kg/m^3]  // 模具密度
  Cpt = 510.0[J/(kg*K)]  // 模具比热容
  kt = 13.0[W/(m*K)]  // 模具热传导系数
  Hr = 473.6[kJ/kg]
  R = 8.314[J/(mol*K)]
  A1 = 2.101E9[min^-1]
  A2 = -2.014E9[min^-1]
  A3 = 1.96E5[min^-1]
  DE1 = 8.07E4[J*mol^-1]
  DE2 = 7.78E4[J/mol]
  DE3 = 5.66E4[J/mol]

Functions
  int1: Interpolation "function" | funcs = {Tset1, 1}; source = file; filename = cure_cycle.csv

Variables
  var1 "变量 1"
    K1 = A1*exp(-DE1/(R*T))
    K2 = A2*exp(-DE2/(R*T))
    K3 = A3*exp(-DE3/(R*T))
    da_dt = (K1+K2*a)*(1-a)*(0.47-a)*(a<=0.3)+K3*(1-a)*(a>0.3)
    pr = (90*a+1232*(a<=0.45)+1272*(a>0.45))[kg/(m^3)]
    Ta = Tset1(t/60)

Probes
  pdom1: DomainPoint "域点探针 1" | coords = {25, 10}
    ppb1: PointExpr "温度" | expr = T; unit = K; descr = 温度; table = tbl1
    ppb2: PointExpr "固化度" | expr = a; unit = 1; descr = 因变量 a; table = tbl2
    ppb3: PointExpr "点探针表达式 3" | expr = Ta(t); descr = 分段 1; table = tbl4

Geometry
  geom1 "几何 1" (2D, length unit mm)
    r1: Rectangle "矩形 1" | size = {50, 20}
    r2: Rectangle "矩形 2" | pos = {0, -20}; size = {50, 20}
    fin: Finalize "形成联合体"

Materials
  mat1: Common "com" on all domains
    def "基本"
      density = pc
      heatcapacity = Cpc
      thermalconductivity = diag{kc11, kc22, kc22}
  mat2: Common "tool" on domains 1
    def "基本"
      density = pt
      heatcapacity = Cpt
      thermalconductivity = kt

Physics
  ht: HeatTransfer "固体传热" on all domains
    dependent variable T
    solid1: SolidHeatTransferModel "固体 1" (default)
    init1: init "初始值 1" (default)
    ins1: ThermalInsulation "热绝缘 1" (default)
    hs1: HeatSource "热源 1" on domains 2 | Q0 = pr*vr*Hr*da_dt
    temp1: TemperatureBoundary "温度 1" (disabled) on boundaries 4, 5 | T0 = Ta(t)
    hf1: HeatFluxBoundary "热通量 1" on boundaries 5 | HeatFluxType = ConvectiveHeatFlux; h = 120; Text = Tset1(t/60)
    hf2: HeatFluxBoundary "热通量 2" on boundaries 2 | HeatFluxType = ConvectiveHeatFlux; q0 = 70; h = 70; Text = Tset1(t/60)
  g: GeneralFormPDE "一般形式偏微分方程" on all domains
    dependent variable a
    gfeq1: GeneralFormPDE "一般形式偏微分方程 1" (default) | f = da_dt; Ga = {0, 0}; da = 1
    zflx1: ZeroFluxBoundary "零通量 1" (default)
    init1: init "初始值 1" (default) | a = 0.001; at = 0.001

Mesh
  mesh1 "网格 1" (physics-controlled)

Studies
  std1 "研究 1"
    param: Parametric "参数化扫描" (disabled)
      pname = {r1, r2, dt1, dt3, dT1, dT2}
      plistarr = {1.5 2.2 1.1 2.4 2.1 1 1.6 2.4 1 1.9 2.8 2.7 2.5 1.4 1.4 3 1.2 2.2 1.8 2.1 2.9 1.5 2.9 2.5 1.9 1.9 2.2 1.9 1.1 2.3 2.6 1.3 2.2 2.7 2.8 2.8 2.2 1.2 1.7 2.6 2.1 1 2 2.7 1 2.1 1.2 1.3 2.3 2.2 2.3 1.7 2.1 2.3 2.2 2.8 2 2.9 2.8 2.8 2.1 1.7 2.2 1.5 1.5 2.8 1.6 3 1.3 2.5 1.2 2.4 2.8 1 1.9 2.2 2.7 2.6 2.3 1 1 2.9 1.6 2.7 2.6 2.3 2.4 1.7 2.6 1.2 1.4 1.4 2 2.1 1.1 1.7 1.1 2.8 1.5 3 2.7 2.6 2.4 2.5 1.4 2.3 2.8 1.8 2.3 2.2 1.3 2.8 2.5 1.7 2.4 2.7 1.9 2.6 2 1.1 1.1 1.4 2.4 1.9 1.4 1.6 1.7 1.3 1.2 1 2.5 1.8 1.1 2.1 1.6 1.6 2.4 3 2.3 1.7 1.3 2.6 2.2 1.5 1.5 2.3 1.8 1.7 1.8 2.6 2.5 1.4 2 1.7 1.9 1.2 2.9 1.3 1.6 2.7 2.1 1.5 2.2 2.3 1.9 2 2.1 2.5 2.4 1.2 2.7 1.1 2 3 1.9 1.4 3 2.2 1.9 2 1.2 1.2 1.7 2.8 1.9 1.7 2.9 1.8 2.8 1.6 2.3 2.3 2.9 1.5 2.8 1.3 2.1 2.3 2.5 3, 3 2.8 2.9 2.2 2 1.5 2.3 2.4 1.8 2.3 1.4 2 1.9 1.8 2.1 3 1.5 1.3 2 2.3 1.9 1 2.7 2.5 2 2.8 2.1 1.2 1.8 2 2.4 1.3 1.9 1.5 1.2 2.9 1.6 1.6 1.8 1.6 1.8 1.1 2.1 3 1.2 1.8 2.4 1.9 2.5 2.7 2.5 2.8 2.6 1.7 1.1 1.3 1.2 1 2.1 2.2 1.2 2.2 2.9 1.3 2.1 2.3 1.5 2.3 1.5 1.7 2.8 1 2.5 1.6 2.9 2.9 2.3 1.1 1.7 1.2 1.2 1.4 2.9 1.3 1.3 2.7 2.1 1 2.4 2.7 1.3 1.3 2.2 1.7 1.9 1.9 1.1 1.9 1.4 2.8 2.2 1.8 1.1 2.1 1.9 2.6 1.7 1.7 1.8 1.1 2.4 2.8 1.9 2.6 2.2 1.5 1 1.4 2.7 1.4 2.4 1.2 2.9 1.1 1.9 1.2 1.8 2 2.9 2.3 2 2.1 1.7 1.5 2 1.5 2.2 1.1 1.3 1.3 1.2 1.6 1.1 2.8 2.9 1.6 2.2 2.4 1.2 1.1 2.4 1.4 1.7 3 1.7 1.1 2.3 2.3 1.1 1.4 1.6 1.8 2.7 1.7 2.6 1.3 1.5 1.5 1.6 1.6 2.5 1.1 2.3 2.3 2.6 1.4 1.8 1.2 1.2 1.3 1 2.8 1.3 2.7 1.8 2.8 2.5 2.9 1.2 2.6 1.6 2.1 3 1.6 1.8 1.5 2.8 2.1 1.1 2.2, 42 50 63 59 40 37 59 76 75 50 52 50 49 36 76 37 56 39 71 53 79 53 60 60 35 51 68 74 36 45 35 78 39 37 49 39 71 42 44 48 40 34 61 39 57 60 61 72 61 54 73 55 73 42 58 73 46 70 53 61 68 39 63 73 74 46 70 63 72 59 42 60 39 54 48 37 74 52 49 48 65 62 51 51 57 69 57 33 76 43 48 69 54 51 38 57 45 74 73 40 36 73 50 37 53 63 36 31 66 63 79 54 42 57 53 32 33 60 30 37 69 56 64 44 55 67 36 63 66 35 53 76 45 72 79 44 39 78 49 47 59 32 72 43 62 34 42 64 45 75 68 69 52 79 71 76 60 69 62 75 54 55 72 64 56 59 51 75 38 31 53 49 70 41 60 51 62 52 43 35 40 39 39 63 79 78 76 69 48 72 42 44 69 76 30 49 53 73 73 64, 103 31 53 58 40 96 35 41 92 71 51 58 69 68 107 58 32 77 47 81 50 104 76 61 44 98 100 118 54 38 35 113 54 87 81 34 89 39 67 66 60 85 39 56 51 94 94 50 113 64 119 54 84 80 100 118 106 114 40 88 33 69 39 113 76 105 46 70 65 69 60 57 114 91 70 95 71 95 119 74 104 58 105 118 79 33 62 42 109 117 36 32 42 98 113 61 75 78 85 83 91 69 56 48 67 94 31 54 117 82 108 57 66 119 79 49 72 42 51 114 119 52 85 68 91 73 43 50 119 75 71 45 61 77 116 59 61 62 69 87 46 33 109 85 51 93 64 76 69 31 103 93 59 94 83 79 60 102 72 97 43 57 115 48 56 108 119 90 46 56 117 58 76 43 35 90 82 44 106 53 51 117 86 71 48 87 105 60 65 56 42 47 62 47 91 103 58 84 107 99, 102 121 121 127 104 123 93 96 113 111 112 99 104 101 124 126 122 105 95 109 106 129 112 116 115 91 110 119 96 97 120 114 92 90 111 104 109 129 104 129 109 108 117 111 118 95 123 112 114 125 117 109 118 107 95 105 98 125 90 121 91 122 90 124 117 128 96 91 95 92 99 100 102 105 92 123 106 96 96 106 101 115 129 92 98 121 116 121 108 124 119 120 95 117 124 119 91 117 116 106 115 110 104 97 92 90 116 112 91 128 119 100 128 129 103 101 129 112 103 111 126 129 110 106 108 114 93 109 128 121 108 100 99 101 125 105 114 118 104 118 97 116 109 125 125 128 113 114 110 105 97 101 126 121 118 110 109 109 100 125 127 93 129 98 100 94 107 109 103 95 119 95 111 101 93 129 103 113 117 118 93 126 92 111 110 123 115 113 123 100 129 117 107 123 104 95 100 108 103 129, 74 49 56 68 95 67 73 86 71 24 55 64 78 62 70 19 36 37 80 77 72 11 80 41 30 87 56 71 49 82 76 46 106 75 43 89 71 12 35 32 65 64 77 24 65 73 43 49 77 23 57 82 28 52 40 53 71 47 74 64 77 23 85 53 61 16 66 101 59 107 62 51 96 31 64 64 57 57 99 42 66 79 63 87 99 56 71 58 32 16 71 61 61 63 57 67 46 47 44 92 80 26 37 93 71 80 25 37 82 13 69 46 46 52 71 77 32 47 43 55 65 29 27 47 60 48 52 79 66 14 47 59 97 42 46 42 21 81 69 60 40 28 38 47 18 30 60 57 77 36 93 77 40 28 67 65 30 63 58 40 37 102 42 51 87 49 72 52 63 46 26 56 35 38 46 56 84 45 44 73 67 38 85 27 48 38 62 59 52 47 38 82 28 42 54 104 46 28 96 12}
      punit = {K/min, K/min, min, min, K, K}
    time: Transient "瞬态" | tunit = min; tlist = range(0,1,500); usertol = on; rtol = 0.001

Solver configurations
  sol1 "解 1" (study std1)
    v1: Variables "Dependent Variables 1"
    t1: Time "Time-Dependent Solver 1"
      tlist = range(0,1,500)
      atolmethod = {comp1_a, global, comp1_T, global}
      atolvaluemethod = {comp1_a, factor, comp1_T, factor}
      atol = {comp1_a, 1e-3, comp1_T, 1e-3}
      maxorder = 2
      estrat = exclude
      fc1: FullyCoupled | linsolver = d1; damp = 0.9; jtech = once; stabacc = aacc; aaccdim = 5
      d1: Direct

Datasets
  dset1: Solution | solution = sol1
  dset2: Solution "探针解 2" | solution = sol1
  cpt1: CutPoint2D "域点探针 1" | data = dset2; pointx = 25; pointy = 10

Derived values
  pev1: EvalPoint "温度" | data = cpt1; table = tbl1; expr = T
  pev2: EvalPoint "固化度" | data = cpt1; table = tbl2; expr = a; descr = 因变量 a
  gev1: EvalGlobal "Tc(t)" | data = dset1; table = tbl3; expr = {ppb1, Ta(t)}; descr = {探针变量 ppb1, 分段 1}
  pev3: EvalPoint "点探针表达式 3" | data = cpt1; table = tbl4; expr = Ta(t)

Tables
  tbl2: Table "探针表 2"
    Time (min) | 因变量 a (1), Point: (25, 10)
    0 | 0.0010033
    1 | 0.0010074
    2 | 0.00101153
    3 | 0.00101573
    4 | 0.00102005
    5 | 0.0010245
    6 | 0.00102916
    7 | 0.001034
    8 | 0.00103919
    9 | 0.00104469
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  tbl3: Table "表格 3"
    // Tc(t) (ppb1, Ta(t))
    时间 (s) | 探针变量 ppb1 (K) | 分段 1
    0 | 293.15 | 293
    60 | 293.24 | 295.8
    120 | 293.512 | 298.6
    180 | 294.009 | 301.4
    240 | 294.73 | 304.2
    300 | 295.577 | 307
    360 | 296.584 | 309.8
    420 | 297.751 | 312.6
    480 | 299.077 | 315.4
    540 | 300.448 | 318.2
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  tbl4: Table "探针表 4"
    Time (min) | 温度, Point: (25, 10)
    0 | nan
    1 | nan
    2 | nan
    3 | nan
    4 | nan
    5 | nan
    6 | nan
    7 | nan
    8 | nan
    9 | nan
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
Plots
  pg1: PlotGroup1D "探针图组 1"
    tblp1: Table "探针表图 1" | table = tbl1; xaxisdata = auto; plotcolumns = 2
    tblp2: Table "探针表图 2" | table = tbl4; xaxisdata = auto; plotcolumninput = manual; plotcolumns = 2
  pg5: PlotGroup1D "探针图组 5"
    tblp1: Table "探针表图 1" | table = tbl2; xaxisdata = auto; plotcolumns = 2
  pg6: PlotGroup2D "温度 (ht)" | data = dset1
    surf1: Surface "表面" | expr = T
  pg7: PlotGroup2D "等温线 (ht)" | data = dset1
    con1: Contour "等值线" | expr = T
  pg8: PlotGroup2D "二维绘图组 8" | data = dset1
    surf1: Surface "表面 1" | expr = a