// COMSOL Multiphysics 5.6.0.280 model "8502.mph"
// Outline of the model tree

Parameters
  index = 1
  t1 = 46.6[min]
  dt2 = 62.34[min]
  dt3 = 21.29[min]
  dt6 = 26.85[min]
  dt7 = 66.66[min]
  dh1 = 87.8[K]
  dh3 = 187.6[K]
  Hr = 540000[J/kg]  // 树脂单位质量固化放热
  Vr = 0.426  // 树脂体积分数
  rho_r = 1300[kg/m^3]  // 树脂的密度
  k_r = 0.243[W/(m*K)]  // 树脂的导热系数
  C_r = 1304.2[J/(kg*K)]  // 树脂的比热容
  Vf = 1-Vr  // 纤维的体积分数
  C_f = 955[J/(kg*K)]  // 纤维的比热容
  rho_f = 1790[kg/m^3]  // 纤维的密度
  k_f = 2.907[W/(m*K)]  // 纤维的导热系数
  rho_tool = 8150[kg/m^3]  // 模具的密度
  k_tool = 13.0[W/(m*K)]  // 模具的导热系数
  C_tool = 510.0[J/(kg*K)]  // 模具的比热容
  A = 1.528E5[1/s]
  deltaE = 6.650E4[J/mol]
  R = 8.314[J/(mol*K)]
  M = 0.8129
  N = 2.7360
  C = 43.09
  C_T = 5.475E-3[1/K]
  C0 = -1.6840
  h_t = 70[W/(m^2*K)]  // 模具的对流换热系数
  h_c = 120[W/(m^2*K)]  // 复材的对流换热系数
  t_totol = 225[min]

Functions
  pw1: Piecewise "固化工艺曲线"
    funcname = Tset1
    arg = t
    zonelengthtype = absolute
    pieces = 
      {0, t1, 293+t*(dh1/t1)}
      {t1, t1+dt2, 293+dh1}
      {t1+dt2, t1+dt2+dt3, 293 + dh1 -(t-t1-dt2)*(dh1-dh3)/(dt3)}
      {t1+dt2+dt3, t1+dt2+dt3+dt6, 293 + dh3}
      {t1+dt2+dt3+dt6, t1+dt2+dt3+dt6+dt7, 293 + dh3 - (t - t1 -dt2 - dt3- dt6)*dh3/dt7}
      {t1+dt2+dt3+dt6+dt7, t_totol, 293}
    argunit = s
    fununit = K
  int1: Interpolation | source = file; filename = C:\cgx\OneDrive - nuaa.edu.cn\00 所有数据\2022\2022年05月12日 优化\ComsolPY\mph\cure_cycle.csv

Variables
  var1 "变量 1" on domains 1, 2
    C_c = C_r*Vr+C_f*Vf
    rho_c = rho_r*Vr+rho_f*Vf  // 复材的密度
    BB = 2*(k_r/k_f-1)
    CC = (Vf/pi)^0.5
    DD = (1-(BB^2)*CC^2)^0.5
    k_c = k_r*((1-2*CC)+1/BB*(pi-4/DD*atan(DD/(1+BB*CC))))
    Ta = Tset1(t)

Probes
  pdom1: DomainPoint "域点探针 1" | coords = {40, 35}
    ppb1: PointExpr "点探针表达式 1" | expr = T; unit = K; descr = 温度; table = tbl1
  pdom2: DomainPoint "域点探针顶面" | coords = {40, 0}
    ppb2: PointExpr "点探针表达式 1" | probename = Tset1; expr = Ta; unit = K; table = tbl1

Geometry
  geom1 "几何 1" (2D, length unit mm)
    r1: Rectangle "矩形 1" | size = {80, 20}
    r2: Rectangle "矩形 2" | pos = {0, 20}; size = {80, 30}
    fin: Finalize "形成联合体"

Materials
  mat2: Common "材料 2" on domains 2
    def "基本"
      thermalconductivity = k_c
      density = rho_c
      heatcapacity = C_c
  mat3: Common "材料 3" on domains 1
    def "基本"
      thermalconductivity = k_tool
      density = rho_tool
      heatcapacity = C_tool

Physics
  ht: HeatTransfer "固体传热" on all domains
    dependent variable T
    PhysicalModelProperty.dz = 0.2[m]
    solid1: SolidHeatTransferModel "固体 1" (default)
    init1: init "初始值 1" (default) | Tinit = 293[K]
    ins1: ThermalInsulation "热绝缘 1" (default)
    hs1: HeatSource "热源 1" on domains 2 | Q0 = at*Hr*Vr*rho_r
    hf1: HeatFluxBoundary "热通量 1" on boundaries 5 | HeatFluxType = ConvectiveHeatFlux; h = h_c; Text = Tset1(t)
    hf2: HeatFluxBoundary "热通量 2" on boundaries 2 | HeatFluxType = ConvectiveHeatFlux; h = h_t; Text = Tset1(t)
  g: GeneralFormPDE "一般形式偏微分方程" on domains 2
    dependent variable a
    Units.CustomSourceTermUnit = 1/s
    gfeq1: GeneralFormPDE "一般形式偏微分方程 1" (default)
      f = (A*exp(-deltaE/R/T)*(a^M)*(1-a)^N)/(1+exp(C*(a-C_T*T-C0)))
      Ga = {0, 0}
      da = 1
    zflx1: ZeroFluxBoundary "零通量 1" (default)
    init1: init "初始值 1" (default) | a = 0.05; at = 0.001

Mesh
  mesh1 "网格 1" (physics-controlled)
    size: MeshSizeDefault "大小" | hauto = 4

Studies
  std1 "研究 1"
    time: Transient "瞬态" | tunit = min; tlist = range(0,1,225)

Solver configurations
  sol1 "Solution 1" (study std1)
    v1: Variables "Dependent Variables 1"
    t1: Time "Time-Dependent Solver 1"
      tlist = range(0,1,225)
      atolmethod = {comp1_a, global, comp1_T, global}
      atolvaluemethod = {comp1_a, factor, comp1_T, factor}
      atol = {comp1_a, 1e-3, comp1_T, 1e-3}
      maxorder = 2
      estrat = exclude
      fc1: FullyCoupled | linsolver = d1; damp = 0.9; jtech = once; stabacc = aacc; aaccdim = 5
      d1: Direct

Datasets
  dset1: Solution | solution = sol1
  dset2: Solution "Probe Solution 2" | solution = sol1
  cpt1: CutPoint2D "域点探针 1" | data = dset2; pointx = 40; pointy = 35
  cpt2: CutPoint2D "域点探针顶面" | data = dset2; pointx = 40; pointy = 0

Derived values
  pev1: EvalPoint "点探针表达式 1" | data = cpt1; table = tbl1; expr = T
  pev2: EvalPoint "点探针表达式 1.2" | data = cpt2; table = tbl1; expr = Ta

Tables
  tbl1: Table | filename = C:\cgx\OneDrive - nuaa.edu.cn\00 所有数据\2022\2022年05月12日 优化\ComsolPY\mph\output.txt
    Time (min) | Temperature (K), Point: (40, 35) | Temperature (K), Point: (40, 0)
    0 | 293 | 293
    1 | 293.009 | 294.884
    2 | 293.071 | 296.768
    3 | 293.232 | 298.652
    4 | 293.491 | 300.536
    5 | 293.838 | 302.421
    6 | 294.276 | 304.305
    7 | 294.806 | 306.189
    8 | 295.427 | 308.073
    9 | 296.073 | 309.957
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
Plots
  pg4: PlotGroup1D "探针图组 4"
    tblp1: Table "探针表图 1" | table = tbl1; xaxisdata = auto; plotcolumninput = manual; plotcolumns = {2, 3}
  pg5: PlotGroup2D "Temperature (ht)" | data = dset1
    surf1: Surface | expr = T
  pg6: PlotGroup2D "Isothermal Contours (ht)" | data = dset1
    con1: Contour | expr = T; levelrounding = off
  pg7: PlotGroup2D "2D Plot Group 7" | data = dset1
    surf1: Surface | expr = a